# Welliton Leal - 1543857
# Emanuel de Cesaro - 1756362
# PROJETO DE FILTRO CHEBYCHEV
# Especificações:
A1 := 0.5
f1 := 30*10^3
ω1 := 2*π*f1 = 188496
A2 := 20
f2 := 66*10^3
ω2 := 2*π*f2 = 414690
ω0 := 2*π*f1 = 188496
# Ripple: | Ganho na banda de corte:
Gbw := f2/f1 = 2.2
Hcut := 10^(-A2/20) = 0.1
ε := ((10^A1)^(1/10) - 1)^(1/2) = 0.349311
# Ordem do Filtro:
n := acosh(sqrt(1 - Hcut^2)/(ε*Hcut))/acosh(Gbw) = 2.8358
# Baseado em 'n' a ordem mínima do filtro será:
o := ceil(n) = 3
# Polos:
p(k) := -ω0*(sin((2*k - 1)*π/(2*o))*sinh((1/o)*asinh(1/ε))) + 1i*ω0*(cos((2*k - 1)*π/(2*o))*cosh((1/o)*acosh(1/ε)))
v := 1, 2 .. o
p(v) = [-59042.1 + 190583i; -118084; -59042.1 - 190583i]
p(v)/ω0 = [-0.313228 + 1.01107i; -0.626456; -0.313228 - 1.01107i]
R1 := 1*10^3
R2 := 1*10^3
# Sallen Key 1:
wn1 := sqrt((-p(1))*(-p(o))) = 199519
Q1 := wn1/(-p(1) - p(o)) = 1.68963
C2 := 1/(2*Q1*wn1*R1) = 1.48318e-9
C1 := 4*(Q1^2)*C2 = 1.69371e-8
# RC:
C3 := 1/(-p(2)*R1) = 8.46853e-9
