# Projeto Filtro Butterworth
# Especificações:
# Ganhos:
A := 1  # (Bandwidth)
B := 20  # (Atenuation)
f1 := 250
G1 := 10^(-A/20) = 0.891251
f2 := 25000
G2 := 10^(-B/20) = 0.1
# Número de Polos: | Frequências:
ω1 := 2*π*f1 = 1570.8
ω2 := 2*π*f2 = 157080
n := -ln(((1/G2^2) - 1)/(1/G1^2 - 1))/(2*ln(1/(f2/f1))) = 0.645615
# Baseado em 'n' a ordem mínima do filtro será:
o := ceil(n) = 1
# Frequência Natural:
ωo := (ω1^(2*o)/(1/G1^2 - 1))^(1/(2*o)) = 3086.97
fo := ωo/(2*π) = 491.307
b := 1
# Polos:
fc := 250
p(k) := ωo*exp(1i*π/2)*exp(1i*π*(2*k - 1)/(2*o))
ωc := fc*2*π = 1570.8
v := 1, 2 .. o
p(i) := ωo*exp(1i*π/2)*exp(1i*π*(2*i - 1)/(2*b))
p(v) = [-3086.97]
j := 1, 2 .. o
p(j) = [-3086.97]
# Solução: 2 Butterwoth's + 1 Filtro RC de 1º Ordem
# Fatores de Qualidade:
Rz := 100
Cs := 100*10^-9
Q1 := ωo/(-p(1) - p(o)) = 0.5
Cz := 1/(ωc*Rz) = 6.3662e-6
Rs := 1/(ωc*Cs) = 6366.2
Q2 := ωo/(-p(2) - p(o - 1)) = -0.5
Q3 := ωo/p((o - 1)/2 + 1) = -1
# Sallen-Key 1:
R1 := 1000
R2 := 1000
C1 := Q1*(R1 + R2)/(ωo*(R1*R2)) = 3.23942e-7
C2 := 1/(ωo^2*R1*R2*C1) = 3.23942e-7
# Sallen-Key 2:
R3 := 1000
R4 := 1000
C3 := Q2*(R3 + R4)/(ωo*(R3*R4)) = -3.23942e-7
C4 := 1/(ωo^2*R3*R4*C3) = -3.23942e-7
# RC:
R5 := 1000
C6 := 100*10^-9
C := 1/(ωo*R5) = 3.23942e-7
R6 := 1/(ωo*C6) = 3239.42
