# Welliton Leal -1543857
# Emanuel de Cesaro - 1756362
# Projeto Filtro Butterworth
# Especificações:
# Ganhos:
A := 0.5  # (Bandwidth)
B := 20  # (Atenuation)
f1 := 30*10^3
G1 := 10^(-A/20) = 0.944061
f2 := 66*10^3
G2 := 10^(-B/20) = 0.1
# Número de Polos: | Frequências:
ω1 := 2*π*f1 = 188496
ω2 := 2*π*f2 = 414690
n := -ln(((1/G2^2) - 1)/(1/G1^2 - 1))/(2*ln(1/(f2/f1))) = 4.24798
# Baseado em 'n' a ordem mínima do filtro será:
o := ceil(n) = 5
# Frequência Natural:
ωo := (ω1^(2*o)/(1/G1^2 - 1))^(1/(2*o)) = 232626
fo := ωo/(2*π) = 37023.6
# Polos:
p(k) := ωo*exp(1i*π/2)*exp(1i*π*(2*k - 1)/(2*o))
v := 1, 2 .. o
p(v) = [-71885.4 + 221241i; -188199 + 136734i; -232626; -188199 - 136734i; -71885.4 - 221241i]
# Solução: 2 Butterwoth's + 1 Filtro RC de 1º Ordem
# Fatores de Qualidade:
Q1 := ωo/(-p(1) - p(o)) = 1.61803
Q2 := ωo/(-p(2) - p(o - 1)) = 0.618034
Q3 := ωo/p((o - 1)/2 + 1) = -1
# Sallen-Key 1:
R1 := 1000
R2 := 1000
C1 := Q1*(R1 + R2)/(ωo*(R1*R2)) = 1.3911e-8
C2 := 1/(ωo^2*R1*R2*C1) = 1.32838e-9
# Sallen-Key 2:
R3 := 1000
R4 := 1000
C3 := Q2*(R3 + R4)/(ωo*(R3*R4)) = 5.31354e-9
C4 := 1/(ωo^2*R3*R4*C3) = 3.47776e-9
# RC:
R5 := 1000
C5 := 1/(ωo*R5) = 4.29874e-9
