# Projeto de Filtro IIR pela Invariância do Impulso
# Parâmetro do filtro
0.89125 ≤ H(e^(1*i*ω)) ≤ 1
0 ≤ |ω| ≤ 0.2*π
0.4*π ≤ |ω| ≤ π
H(e^(1*i*ω)) ≤ 0.17783
|Hc*(1i*Ω_p)| ≥ 0.89125
|Hc*(1i*Ω_s)| ≤ 0.17783
fs := 10000
T := 1/fs
N := 1
Ω_p := 0.2*π/T = 6283.19
Ω_s := 0.4*π/T = 12566.4
Ωc := 1
# Utilizando a Aproximação de Butterworth
Given
(0.89125^2 - 1/(1 + (Ω_p/Ωc)^(2*N)) == 0)
(0.17783^2 - 1/(1 + (Ω_s/Ωc)^(2*N))) == 0
x := Find(N, Ωc)
x = [3.44294; 7645.41]
N := ceil(x[0]) = 4
Ωc := x[1] = 7645.41
Given
(0.17783^2 - 1/(1 + (Ω_s/Ωc)^(2*N)) == 0)
Ωc := Find(Ωc) = 8193.24
k := 0, 1 .. (N - 1)
s := 0
Given
n := 0, 1 .. (2*N - 1)
s(k) := Ωc*e^((1i*π/(2*N))*(2*k + N - 1))
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s(n) simplify; rectangular → [
    3135.41659057 + 7569.56525665i;
    -3135.41659057 + 7569.56525665i;
    -7569.56525665 + 3135.41659057i;
    -7569.56525665 - 3135.41659057i;
    -3135.41659057 - 7569.56525665i;
    3135.41659057 - 7569.56525665i;
    7569.56525665 - 3135.41659057i;
    7569.56525665 + 3135.41659057i
]
(S - s(1))*(S - s(4)) simplify → S^2 + 6270.83318115*S + 67129155.3712
(S - s(2))*(S - s(3)) simplify → S^2 + 15139.1305133*S + 67129155.3712
H(S) == 1/((S^2 + 6270.83318115*S + 67129155.3712)*(S^2 + 15139.1305133*S + 67129155.3712))
(1i*2*π*f)
H(S) == 67129155.3712^2/((S^2 + 6270.83318115*S + 67129155.3712)*(S^2 + 15139.1305133*S + 67129155.3712))
f := 0, 10 .. 6000  # (1i*2*π*f)
H(f) := 67129155.3712^2/(((1i*2*π*f)^2 + 6270.83318115*(1i*2*π*f) + 67129155.3712)*((1i*2*π*f)^2 + 15139.1305133*(1i*2*π*f) + 67129155.3712))
HdB(f) := 20*log(|H(f)|)
Hfase(f) := arg(H(f))*180/π
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Ω_p/(2*π) = 1000
|H(1000)| = 0.945073
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|H(2000)| = 0.17783
Ω_s/(2*π) = 2000
|H(1304)| = 0.707101
Ωc/(2*π) = 1303.99
# Confirmando a teoria do Butterworth
20*log(0.707) = -3.01161
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H(z) == T*Ak/(1 - e^(s(k)*T)*z^-1)
H(z) == (0.0426528811084*z^3 + 0.0972574951234*z^2 + 0.0146748290662*z^1)/(z^4 - 1.95500311807*z^3 + 1.70246934135*z^2 - 0.710510135325*z^1 + 0.117537673713)
ω := 0, 0.01 .. π  # e^(1i*ω)
H(ω) := (0.0426528811084*(e^(1i*ω))^3 + 0.0972574951234*(e^(1i*ω))^2 + 0.0146748290662*(e^(1i*ω))^1)/((e^(1i*ω))^4 - 1.95500311807*(e^(1i*ω))^3 + 1.70246934135*(e^(1i*ω))^2 - 0.710510135325*(e^(1i*ω))^1 + 0.117537673713)
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|H(0.2*π)| = 0.944751
|H(0.4*π)| = 0.177363
HdBZ(ω) := 20*log(|H(ω)|)
HfaseZ(ω) := arg(H(ω))*180/π
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Y(z)/X(z) == H(z) == (0.0426528811084*z^3 + 0.0972574951234*z^2 + 0.0146748290662*z^1)/(z^4 - 1.95500311807*z^3 + 1.70246934135*z^2 - 0.710510135325*z^1 + 0.117537673713)
y(n) - 1.95500311807*y(n - 1) + 1.70246934135*y(n - 2) - 0.710510135325*y(n - 3) + 0.117537673713*y(n - 4) == (0.0426528811084*x(n) - 1) + 0.0972574951234*x(n - 2) + 0.0146748290662*x(n - 3)
y(n) == 0.0426528811084*x(n - 1) + 0.0972574951234*x(n - 2) + 0.0146748290662*x(n - 3) - 0.117537673713*y(n - 4) + 1.95500311807*y(n - 1) - 1.70246934135*y(n - 2) + 0.710510135325*y(n - 3)
